// COMSOL Multiphysics 5.5.0.292 model "1DBatTeeth.mph"
// Outline of the model tree

Parameters
  Ly = 20
  Lx = 4
  a = .5
  b = 1
  d = 200
  uss = (b+alpha)/a
  alpha = .1
  vss = uss^2/b
  R = .3
  T = 1e4
  theta = 0.5
  nums = 300
  Tp = T
  R1 = 2
  R2 = 2
  t1 = .3
  t2 = .4
  g1 = 20
  g2 = 7

Functions
  rn1: Random | type = normal; normalsigma = 1e-2; seed = 113013
  rn2: Random | type = normal; normalsigma = 1e-2; seed = 113014
  an1: Analytic | funcname = r1; expr = R1*B(t/T,t1,g1); args = t
  an2: Analytic | funcname = r2; expr = 1+R2*B(t/T,t2,g2); args = t
  an3: Analytic | funcname = r; expr = r1(t)+r2(t); args = t
  an4: Analytic | funcname = r1p; expr = R1*Bp(t/T,t1,g1)/T; args = t
  an6: Analytic | funcname = r2p; expr = R2*Bp(t/T,t2,g2)/T; args = t
  an8: Analytic | funcname = B; expr = (1+tanh(g*(t-tj)))/2; args = {t, tj, g}
  an9: Analytic | funcname = Bp; expr = (g*sech(g*(t-tj))^2)/2; args = {t, tj, g}
  an10: Analytic | funcname = rp; expr = r1p(t)+r2p(t); args = t

Variables
  var2 "Variables 2"
    S1 = r1p(t)/r1(t)
    S2 = r2p(t)/r2(t)
    Sold = (S1*(x<theta)+S2*(x>=theta))
    A = x*S1*(x<theta)+(x>=theta)*(theta*(S1-S2)+x*S2)
    Sr = rp(t)/r(t)
    adv = (x*(r1p(t)+r2p(t))-r1p(t))/r(t)
    S = 0

Geometry
  geom3 "Geometry 3" (1D, length unit m)
    i1: Interval | coord = 0, 1
    fin: Finalize "Form Union"

Physics
  c2: CoefficientFormPDE on all domains
    dependent variable u2 = {u, v}
    cfeq1: CoefficientFormPDE (default)
      c = {0.005/((Lx^2)*(r(t)^2)), 0, 0, 1/((Lx^2)*(r(t)^2))}
      a = {S, 0, 0, S}
      f = {alpha+u^2/v-a*u, u^2-b*v}
      da = {1, 0, 0, 1}
      be = {-adv, 0, 0, -adv}
    zflx1: ZeroFluxBoundary "Zero Flux 1" (default)
    init1: init "Initial Values 1" (default)
      u = uss*abs(1+rn1(x))
      v = vss*abs(1+rn2(x))
      u2 = uss*abs(1+rn1(x,y))
      v2 = vss*abs(1+rn1(x,y))
    dir1: DirichletBoundary "Dirichlet Boundary Condition 1" on all boundaries
      r = {R, 0}
      useDirichletCondition = {1, 0}

Mesh
  mesh3 "Mesh 3"
    size: MeshSizeDefault | hmax = 1/10000; hauto = 1; custom = on
    edg1: Edge on remaining entities

Studies
  std1 "Study 1"
    time: Transient "Time Dependent" | tlist = range(0,T/nums,T); usertol = on; rtol = 0.0001

Solver configurations
  sol1 "Solution 1" (study std1)
    v1: Variables "Dependent Variables 1"
    t1: Time "Time-Dependent Solver 1"
      tlist = range(0,T/nums,T)
      initialstepbdf = 1e-7
      maxstepconstraintbdf = expr
      maxstepexpressionbdf = T/100
      eventtol = 0.0001
      dDef: Direct
      fc1: FullyCoupled | linsolver = dDef

Datasets
  dset1: Solution | solution = sol1
  par1: Parametric1D "Parametric Extrusion 1D 1" | data = dset1

Plots
  pg1: PlotGroup1D "1D Plot Group 1" | data = dset1
    lngr1: LineGraph on all domains | expr = u; xdata = expr; xdataexpr = x
  pg2: PlotGroup2D "2D Plot Group 2" | data = par1
    surf1: Surface | expr = u
    con1: Contour | expr = (0.5+r1(t))/r(t)>x

Exports
  img1: Image
    size = manualweb
    unit = px
    width = 640
    height = 480
    pngfilename = /home/krause/Desktop/BatTeeth/Images/N10R50T0p1Thresh.png
  data1: Data
    data = dset1
    expr = {u, }
    filename = /home/krause/Desktop/BatTeeth/Plotting/NonUniform.csv
    location = regulargrid
    regulargridx1 = 1000