// COMSOL Multiphysics 6.0.0.312 model "2DBatTeethSlowGrowthPiecewiseUpdated.mph"
// Outline of the model tree
// Components: comp1 "Component 1", comp2 "Component 2"

Parameters
  Ly = 2
  Lx = 2
  a = .5
  b = 1
  d = .005
  uss = (b+alpha)/a
  alpha = .1
  vss = uss^2/b
  R = .3
  T = 1e4
  theta = 0.5
  nums = 500
  Tp = T
  R1 = 10
  R2 = 6
  t1 = .3
  t2 = .4
  g1 = 40
  g2 = 10
  stuff = r(T*1)*Lx

Functions
  rn1: Random | nargs = 2; type = normal; normalsigma = 1e-2; seed = 113013
  rn2: Random | nargs = 2; type = normal; normalsigma = 1e-2; seed = 113014
  an1: Analytic | funcname = r1; expr = 1+R1*B(t/T,t1,g1); args = t
  an2: Analytic | funcname = r2; expr = 1+R2*B(t/T,t2,g2)+R2*B(t/T,t1/2,g1/2); args = t
  an3: Analytic | funcname = r; expr = theta*r1(t)+(1-theta)*r2(t); args = t
  an4: Analytic | funcname = r1p; expr = R1*Bp(t/T,t1,g1)/T; args = t
  an6: Analytic | funcname = r2p; expr = R2*Bp(t/T,t2,g2)/T+R2*Bp(t/T,t1/2,g1/2)/T; args = t
  an7: Analytic | funcname = rp; expr = theta*r1p(t)+(1-theta)*r2p(t); args = t
  an8: Analytic | funcname = B; expr = (1+tanh(g*(t-tj)))/2; args = {t, tj, g}
  an9: Analytic | funcname = Bp; expr = (g*sech(g*(t-tj))^2)/2; args = {t, tj, g}
  pw1: Piecewise (disabled) | funcname = P; pieces = {{0, Lx/2, 1}, {Lx/2, Lx, (-0.5*(x-Lx/2)/Lx+1)}}
  an10: Analytic | funcname = A; expr = 1.3-.9*cos(pi*(x-.4))

Variables
  var1 "Variables 1" [comp1]
    S1 = r1p(t)/r1(t)
    S2 = r2p(t)/r2(t)
    S = (S1*(x<theta)+S2*(x>=theta))
    A = x*S1*(x<theta)+(x>=theta)*(theta*(S1-S2)+x*S2)
    Sr = rp(t)/r(t)
    adv = x*Sr-A
    SOld = 0
    advOld = (x*(r1p(t)+r2p(t))-r1p(t))/r(t)

Couplings
  linext1: LinearExtrusion on domains 1
    srcvertex1 = points 2
    srcvertex2 = points 1
    srcvertex3 = points 3
    dstvertex1 = points 2
    dstvertex2 = points 1
    dstvertex3 = points 3
    dstgeom = geom2
    srcmap = {x, y}

Common definitions
  free1: DeformingDomainDeformedGeometry "Deforming Domain 1" [comp2] on all domains
  pres1: PrescribedDeformationDeformedGeometry "Prescribed Deformation 1" [comp2] on all domains
    prescribedDeformation = {Xm*(r(t)-1)-Lx*r1(t)*theta, 0, 0}

Geometry
  geom1 "Geometry 1" [comp1] (2D, length unit m)
    r1: Rectangle
    fin: Finalize "Form Union"
  geom2 "Geometry 2" [comp2] (2D, length unit m)
    r1: Rectangle | size = {Lx, Ly}
    fin: Finalize "Form Union"

Physics
  c: CoefficientFormPDE [geom1] on all domains
    dependent variable u = {u, v}
    cfeq1: CoefficientFormPDE (default)
      c = 
        {d/((Lx^2)*(r(t)^2)), 0, 0, d/Ly^2}
        {0, 0, 0, 0}
        {0, 0, 0, 0}
        {1/((Lx^2)*(r(t)^2)), 0, 0, 1/Ly^2}
      a = {2*S, 0, 0, 2*S}
      f = {alpha+u^2/v-a*u, u^2-b*v}
      da = {1, 0, 0, 1}
      be = {{-adv, 0}, {0, 0}, {0, 0}, {-adv, 0}}
    zflx1: ZeroFluxBoundary "Zero Flux 1" (default)
    init1: init "Initial Values 1" (default) | u = uss*abs(1+rn1(x,y)); v = vss*abs(1+rn2(x,y))
    dir1: DirichletBoundary "Dirichlet Boundary Condition 1" on boundaries 1-4
      r = {0, 0}
      useDirichletCondition = {1, 0}

Mesh
  mesh1 "Mesh 1" [geom1]
    size: MeshSizeDefault | hmax = 0.007; hauto = 1; custom = on
    ftri1: FreeTri "Free Triangular 1" on remaining entities
  mesh2 "Mesh 2" [geom2]
    size: MeshSizeDefault | hmax = 0.15; hauto = 1; custom = on
    ftri1: FreeTri "Free Triangular 1" on remaining entities

Studies
  std1 "Study 1"
    time: Transient "Time Dependent" | tlist = range(0,T/nums,T); usertol = on; rtol = 0.0001

Solver configurations
  sol1 "Solution 1" (study std1)
    v1: Variables "Dependent Variables 1"
    t1: Time "Time-Dependent Solver 1"
      tlist = range(0,T/nums,T)
      initialstepbdf = 1e-7
      maxstepconstraintbdf = expr
      maxstepexpressionbdf = (T/500+(t<T/2)*T/1500)
      eventtol = 0.001
      dDef: Direct
      fc1: FullyCoupled | linsolver = dDef

Datasets
  dset1: Solution | solution = none
  dset2: Solution | solution = none
  an1_ds1: Grid1D
  an2_ds1: Grid1D "Grid 1D 1a"
  an3_ds1: Grid1D "Grid 1D 1b"
  dset3: Solution | solution = sol1
  dset4: Solution | solution = sol1

Plots
  pg1: PlotGroup2D "2D Plot Group 1" | data = dset4
    surf1: Surface | expr = (comp1.linext1(u))
    ann1: Annotation
    ann3: Annotation
    surf2: Surface (disabled) | expr = comp1.linext1(flc1hs(2-u,2*Ly))
  pg3: PlotGroup1D "1D Plot Group 3" | data = an2_ds1; title = r1(t); xlabel = t; ylabel = r1(t)
    plot1: LineGraph | expr = r1(t)+0.5; autosolution = off; autoexpr = on
    plot2: LineGraph | expr = r2(t)-0.5; autosolution = off; autoexpr = on
    plot3: LineGraph | expr = r(t); autosolution = off; autoexpr = on
  pg4: PlotGroup2D "2D Plot Group 4" | data = dset4
    surf1: Surface | expr = u

Exports
  img1: Image
    sourceobject = pg3
    size = manualweb
    unit = px
    width = 640
    height = 480
    pngfilename = /home/krause/Desktop/BatTeeth/Images/Fig3/Fig3r.png
  anim1: Animation
    giffilename = /home/krause/Desktop/BigM1P4ut.gif
    globalparameter = Tp
    globalpstop = T
    maxframes = 200
  anim2: Animation | target = player; maxframes = 200